// SBML level 2 version 4
// This model was downloaded from BioModels Database
// http://www.ebi.ac.uk/biomodels/

function function_4(P, V3, R, k3)
  P*V3*(1 - R)/(k3 + (1 - R));
end

function function_3(V2, R, Q, K2)
  V2*R*Q/(K2 + Q);
end

function function_2(V1, Q, K1)
  V1*(1 - Q)/(K1 + (1 - Q));
end

function function_1(V, substrate, Km)
  V*substrate/(Km + substrate);
end

function function_0(a, Q)
  a*Q;
end

model Model_0()
  // Goldbeter2006_weightCycling
  // This model is according to the paper of A model for the dynamics of human weight cycling by A. Goldbeter 2006.The figure3 (A) and (B) have been reproduced by Copasi 4.0.19(development) and SBMLodeSolver.The writer of the paper did not specify any units for the metabolites, so the creator of the model did not define the units as well.Both Q and R are normalized to vary between 0 and 1.
  // To the extent possible under law, all copyright and related or neighbouring rights to this encoded model have been dedicated to the public domain worldwide. Please refer to CC0 Public Domain Dedication for more information.
  // In summary, you are entitled to use this encoded model in absolutely any manner you deem suitable, verbatim, or with modification, alone or embedded it in a larger context, redistribute it, commercially or not, in a restricted way or not.
  // To cite BioModels Database, please use: Li C, Donizelli M, Rodriguez N, Dharuri H, Endler L, Chelliah V, Li L, He E, Henry A, Stefan MI, Snoep JL, Hucka M, Le Novère N, Laibe C (2010) BioModels Database: An enhanced, curated and annotated resource for published quantitative kinetic models. BMC Syst Biol., 4:92.
  // biomodels.db:MODEL4644593552
  // biomodels.db:BIOMD0000000079
  // isDescribedBy pubmed:16595882
  // occursIn taxonomy:9606
  // isVersionOf GO:0048511
  // isVersionOf GO:0040014

  // Compartments:
  compartment body = 1;

  // Species:
  // body weight
  substanceOnly species P in body = 0.43*body;
  // dietary intake
  substanceOnly species Q in body = 0.8*body;
  // degree of resolution measuring cognitive restraint
  substanceOnly species R in body = 0.55*body;

  // Reactions:
  Increase_of_P: => P; body*function_0(a, Q);  // modifiers: Q; isVersionOf GO:0040018 GO:0035264
    a = 0.1;
  Decrease_of_P: P => ; function_1(Decrease_of_P_V, P, Decrease_of_P_Km);  // isVersionOf GO:0040015
    Decrease_of_P_V = 0.1; Decrease_of_P_Km = 0.2;
  Increase_of_Q: => Q; function_2(V1, Q, K1);  // isVersionOf GO:0007631
    V1 = 1; K1 = 0.01;
  Decrease_of_Q: Q => ; function_3(V2, R, Q, K2);  // modifiers: R; isVersionOf GO:0002023
    V2 = 1.5; K2 = 0.01;
  Increase_of_R: => R; function_4(P, V3, R, k3);  // modifiers: P; isVersionOf GO:0048520
    V3 = 6; k3 = 0.01;
  Decrease_of_R: R => ; function_1(Decrease_of_R_V, R, Decrease_of_R_Km);  // isVersionOf GO:0048521
    Decrease_of_R_V = 2.5; Decrease_of_R_Km = 0.01;

  // Unit definitions:
  unit time = 604800 second; time is "weeks";
  unit substance = dimensionless; substance is "dimensionless";
end
