// SBML level 2 version 4
// This model was downloaded from BioModels Database
// http://www.ebi.ac.uk/biomodels/

model Zhu2007_TF_syn_modulated_by_Ca()
  // Zhu2007_TF_modulated_by_Calcium
  // This a model from the article:
  // A theoretical study on activation of transcription factor modulated by intracellular Ca2+ oscillations.
  // Zhu CL, Zheng Y, Jia Y Biophys. Chem. [2007 Aug:129(1):49-55 17560007 ,
  // Abstract:
  // This work presents both deterministic and stochastic models of genetic expression modulated by intracellular calcium (Ca2+) oscillations, based on macroscopic differential equations and chemical Langevin equations, respectively. In deterministic case, the oscillations of intracellular Ca2+ decrease the effective Ca2+ threshold for the activation of transcriptional activator (TF-A). The average activation of TF-A increases with the increase of the average amplitude of intracellular Ca2+ oscillations, but decreases with the increase of the period of intracellular Ca2+ oscillations, which are qualitatively consistent with the experimental results on the gene expression in lymphocytes. In stochastic case, it is found that a large internal fluctuation of the biochemical reaction can enhance gene expression efficiency specifically at a low level of external stimulations or at a small rate of TF-A dimer phosphorylation activated by Ca2+, which reduces the threshold of the average intracellular Ca2+ concentration for gene expression.
  // This model originates from BioModels Database: A Database of Annotated Published Models. It is copyright (c) 2005-2009 The BioModels Team.
  // For more information see the terms of use .
  // To cite BioModels Database, please use Le Novère N., Bornstein B., Broicher A., Courtot M., Donizelli M., Dharuri H., Li L., Sauro H., Schilstra M., Shapiro B., Snoep J.L., Hucka M.(2006) BioModels Database: A Free, Centralized Database of Curated, Published, Quantitative Kinetic Models of Biochemical and Cellular Systems Nucleic Acids Res., 34: D689-D691.
  // biomodels.db:MODEL8262954331
  // biomodels.db:BIOMD0000000166
  // isDescribedBy pubmed:17560007
  // isVersionOf GO:0019722
  // occursIn taxonomy:131567

  // Compartments:
  compartment cytoplasm = 1;  // GO:0005829
  compartment store = 1;

  // Species:
  species X in cytoplasm = 15; X is "TF_A";
  species Y in store = 0; Y is "Calcium in store";  // CHEBI:22984 kegg.compound:C00076
  species Z in cytoplasm = 0.25; Z is "Calcium in cytoplasm";  // CHEBI:22984 kegg.compound:C00076

  // Parameters:
  kf0 = 6;
  gamma = 9;
  Ka = 0.5;
  Kb = 0.5;
  Kd0 = 10;

  // Assignment rules:
  kf := kf0*(1 + gamma*Z^4/(Ka^4 + Z^4));
  Kd := Kd0/(1 + Z^4/Kb^4);

  // Reactions:
  TF_synthesis: -> X; kf*X^2/(X^2 + Kd); TF_synthesis is "TF Synthesis";  // isVersionOf GO:0006412
  TF_degradation: X -> ; kd*X;  // isVersionOf GO:0030163
    kd = 1;
  TF_synthesis_basal: -> X; Rbas;  // isVersionOf GO:0006412
    Rbas = 0.1;
  Calcium_Influx: -> Z; v0;  // isVersionOf GO:0007204
    v0 = 1;
  Calcium_Influx_stimulation: -> Z; v1*beta; Calcium_Influx_stimulation is "Calcium Influx by stimulation";  // isVersionOf GO:0007204
    v1 = 5.7; beta = 0.3;
  Calcium_into_store: Z -> Y; Vm2*Z^n/(K2^n + Z^n); Calcium_into_store is "Calcium Influx";  // isVersionOf GO:0051481
    Vm2 = 30; K2 = 0.5; n = 2;
  Calcium_into_cytoplasm: Y -> Z; Vm3*Y^m/(Kr^m + Y^m)*Z^p/(K_A^p + Z^p); Calcium_into_cytoplasm is "Calcium influx to cytoplasm";  // isVersionOf GO:0007204 GO:0051209
    Vm3 = 325; Kr = 1.7; K_A = 0.46; m = 2; p = 4;
  Leakage: Y -> Z; k1*Y; Leakage is "Calcium Leakage";  // isVersionOf GO:0051209 GO:0007204
    k1 = 0.7;
  Leakage_from_cytoplasm: Z -> ; k*Z;  // isVersionOf GO:0051481
    k = 10;

  // Unit definitions:
  unit substance = 1e-6 mole; substance is "micro mole";
  unit time = 60 second; time is "minutes";
end
