// SBML level 2 version 4
// This model was downloaded from BioModels Database
// http://www.ebi.ac.uk/biomodels/

model p53_Mdm2_ATM_System()
  // Proctor2008_p53_Mdm2_ATM
  // This model is automatically converted from the Model BIOMD0000000188 by using libsbml . According to the terms of use , this generated model is not related with Model BIOMD0000000188 any more.
  // biomodels.db:MODEL5836973167
  // biomodels.db:BIOMD0000000188
  // isDescribedBy pubmed:18706112
  // occursIn taxonomy:9606
  // isVersionOf GO:0043516
  // isPartOf kegg.pathway:hsa04115

  // Compartments:
  compartment cell = 1;  // GO:0005623

  // Species:
  substanceOnly species Mdm2 in cell = 5;  // isEncodedBy ensembl:ENSG00000135679; uniprot:Q00987
  substanceOnly species p53 in cell = 5;  // isEncodedBy ensembl:ENSG00000141510; uniprot:P04637
  substanceOnly species Mdm2_p53 in cell = 95;  // hasPart uniprot:Q00987 uniprot:P04637
  substanceOnly species Mdm2_mRNA in cell = 10;  // isVersionOf CHEBI:33699 kegg.compound:C00046
  substanceOnly species p53_mRNA in cell = 10;  // isVersionOf CHEBI:33699 kegg.compound:C00046
  substanceOnly species ATMA in cell = 0;  // uniprot:Q13315
  substanceOnly species ATMI in cell = 200;  // uniprot:Q13315
  substanceOnly species p53_P in cell = 0;  // encodes uniprot:P04637; isEncodedBy ensembl:ENSG00000141510
  substanceOnly species Mdm2_P in cell = 0;  // encodes uniprot:Q00987; isEncodedBy ensembl:ENSG00000135679
  substanceOnly species damDNA in cell = 0;  // isVersionOf CHEBI:16991 GO:0006974
  substanceOnly species $Sink in cell = 1;
  substanceOnly species $Source in cell = 1;
  substanceOnly species p53deg in cell = 0;  // isVersionOf GO:0043161
  substanceOnly species p53syn in cell = 0;  // isVersionOf GO:0006412
  substanceOnly species mdm2deg in cell = 0;  // isVersionOf GO:0043161
  substanceOnly species mdm2syn in cell = 0;  // isVersionOf GO:0006412
  substanceOnly species Mdm2mRNAdeg in cell = 0;  // isVersionOf GO:0006402
  substanceOnly species Mdm2mRNAsyn in cell = 0;  // isVersionOf GO:0003700
  substanceOnly species totp53 in cell;
  substanceOnly species totMdm2 in cell;

  // Parameters:
  IR = 0 decagray;
  ksynMdm2 = 0.000495 psec;
  kdegMdm2 = 0.000433 psec;
  ksynp53 = 0.006 psec;
  kdegp53 = 0.000825 psec;
  kbinMdm2p53 = 0.001155 pmolepsec;
  krelMdm2p53 = 1.155e-5 psec;
  ksynMdm2mRNA = 0.0001 psec;
  kdegMdm2mRNA = 0.0001 psec;
  kactATM = 0.0001 pmolepsec;
  kdegATMMdm2 = 0.0004 psec;
  kinactATM = 0.0005 psec;
  kphosp53 = 0.0005 pmolepsec;
  kdephosp53 = 0.5 psec;
  kphosMdm2 = 2 pmolepsec;
  kdephosMdm2 = 0.5 psec;
  kdam = 0.08 molepsecpdGy;
  krepair = 2e-5 psec;
  kproteff = 1 dimensionless;
  ksynp53mRNA = 0.001 psec;
  kdegp53mRNA = 0.0001 psec;

  // Assignment rules:
  totp53 := p53 + Mdm2_p53 + p53_P;
  totMdm2 := Mdm2 + Mdm2_p53 + Mdm2_P;

  // Reactions:
  p53mRNASynthesis: $Source => p53_mRNA; ksynp53mRNA*Source;  // isVersionOf GO:0003700
  p53mRNADegradation: p53_mRNA => $Sink; kdegp53mRNA*p53_mRNA;  // isVersionOf GO:0006402
  Mdm2Synthesis: Mdm2_mRNA => Mdm2_mRNA + Mdm2 + mdm2syn; ksynMdm2*Mdm2_mRNA;  // isVersionOf GO:0006412
  Mdm2mRNASynthesis1: p53 => p53 + Mdm2_mRNA + Mdm2mRNAsyn; ksynMdm2mRNA*p53;  // isVersionOf GO:0003700
  Mdm2mRNASynthesis2: p53_P => p53_P + Mdm2_mRNA + Mdm2mRNAsyn; ksynMdm2mRNA*p53_P;  // isVersionOf GO:0003700
  Mdm2mRNADegradation: Mdm2_mRNA => $Sink + Mdm2mRNAdeg; kdegMdm2mRNA*Mdm2_mRNA;  // isVersionOf GO:0006402
  Mdm2Degradation: Mdm2 => $Sink + mdm2deg; kdegMdm2*Mdm2*kproteff;  // isVersionOf GO:0043161
  p53Synthesis: p53_mRNA => p53 + p53_mRNA + p53syn; ksynp53*p53_mRNA;  // isVersionOf GO:0006412
  p53Degradation: Mdm2_p53 => Mdm2 + p53deg; kdegp53*Mdm2_p53*kproteff;  // isVersionOf GO:0043161
  P53_Mdm2Binding: p53 + Mdm2 => Mdm2_p53; kbinMdm2p53*p53*Mdm2;  // isVersionOf GO:0002039
  P53_Mdm2Release: Mdm2_p53 => p53 + Mdm2; krelMdm2p53*Mdm2_p53;  // isVersionOf GO:0043624
  DNAdamage: => damDNA; kdam*IR;  // isVersionOf GO:0006974
  DNArepair: damDNA => $Sink; krepair*damDNA;  // isVersionOf GO:0006281
  ATMactivation: damDNA + ATMI => damDNA + ATMA; kactATM*damDNA*ATMI;  // isVersionOf GO:0006468
  p53phoshorylation: p53 + ATMA => p53_P + ATMA; kphosp53*p53*ATMA;  // isVersionOf GO:0006468
  p53dephosorylation: p53_P => p53; kdephosp53*p53_P;  // isVersionOf GO:0006470
  Mdm2phoshorylation: Mdm2 + ATMA => Mdm2_P + ATMA; kphosMdm2*Mdm2*ATMA;  // isVersionOf GO:0006468
  Mdm2dephosorylation: Mdm2_P => Mdm2; kdephosMdm2*Mdm2_P;  // isVersionOf GO:0006470
  Mdm2Pdegradation: Mdm2_P => $Sink + mdm2deg; kdegATMMdm2*Mdm2_P;  // isVersionOf GO:0043161
  ATMInactivation: ATMA => ATMI; kinactATM*ATMA;  // isVersionOf GO:0006470

  // Events:
  stressCell: at (time >= 3600): IR = 25;  // isVersionOf GO:0006950
  stopStress: at (time >= 3660): IR = 0;

  // Unit definitions:
  unit molepsecpdGy = mole / (second * 10 gray);
  unit decagray = 10 gray; decagray is "dGy";
  unit molepsec = mole / second; molepsec is "molpsec";
  unit pmolepsec = 1 / (mole * second); pmolepsec is "pmolpsec";
  unit psec = 1 / second;
end
