// SBML level 2 version 4
// This model was downloaded from BioModels Database
// http://www.ebi.ac.uk/biomodels/

model Hunziker2010_p53_StressSpecificResponse()
  // This a model from the article:
  // Stress-specific response of the p53-Mdm2 feedback loop
  // Alexander Hunziker, Mogens H Jensen and Sandeep Krishna BMC Systems Biology 2010, Jul 12;4(1):94 20624280 ,
  // Abstract:
  // ABSTRACT: BACKGROUND: The p53 signalling pathway has hundreds of inputs and outputs. It can trigger cellular senescence, cell-cycle arrest and apoptosis in response to diverse stress conditions, including DNA damage, hypoxia and nutrient deprivation. Signals from all these inputs are channeled through a single node, the transcription factor p53. Yet, the pathway is flexible enough to produce different downstream gene expression patterns in response to different stresses. RESULTS: We construct a mathematical model of the negative feedback loop involving p53 and its inhibitor, Mdm2, at the core of this pathway, and use it to examine the effect of different stresses that trigger p53. In response to DNA damage, hypoxia, etc., the model exhibits a wide variety of specific output behaviour -- steady states with low or high levels of p53 and Mdm2, as well as spiky oscillations with low or high average p53 levels. CONCLUSIONS: We show that even a simple negative feedback loop is capable of exhibiting the kind of flexible stress-specific response observed in the p53 system. Further, our model provides a framework for predicting the differences in p53 response to different stresses and single nucleotide polymorphisms.
  // The parameters of the model corresponds to the resting state, with delta = 11hr -1 , gamma = 0.2hr -1 , k t = 0.03nM -1 hr -1 and k f = 5000nM -1 hr -1 .
  // To simulate different stress conditions as in figure 2A (also look at the curation figure of this model) of the reference publication, the above parameter should be changed. The parameter values corresponding to different stress conditions are shown in the following table.
  // Stress Condition/Parameter delta gamma k t k f
  // Nutlin 11hr -1 0.2hr -1 0.03nM -1 hr -1 500nM -1 hr -1
  // Oncogene 2hr -1 0.2hr -1 0.03nM -1 hr -1 5000nM -1 hr -1
  // DNA damage 2hr -1 0.5hr -1 0.03nM -1 hr -1 2500nM -1 hr -1
  // Hypoxia 2hr -1 0.2hr -1 0.01nM -1 hr -1 5000nM -1 hr -1
  // This model originates from BioModels Database: A Database of Annotated Published Models. It is copyright (c) 2005-2011 The BioModels.net Team.
  // For more information see the terms of use .
  // To cite BioModels Database, please use: Li C, Donizelli M, Rodriguez N, Dharuri H, Endler L, Chelliah V, Li L, He E, Henry A, Stefan MI, Snoep JL, Hucka M, Le Novère N, Laibe C (2010) BioModels Database: An enhanced, curated and annotated resource for published quantitative kinetic models. BMC Syst Biol., 4:92.
  // biomodels.db:MODEL1006280000
  // biomodels.db:BIOMD0000000252
  // isDescribedBy pubmed:20624280
  // isVersionOf GO:0006950
  // isPartOf kegg.pathway:map04115 reactome:REACT_309
  // hasPart GO:0001666 GO:0030330

  // Compartments:
  compartment cell = 1;

  // Species:
  species $p in cell = 1;  // isEncodedBy ensembl:ENSG00000141510; isVersionOf uniprot:P04637
  species $mm in cell = 1;  // isVersionOf CHEBI:33699 kegg.compound:C00046
  species $m in cell = 1;  // isEncodedBy ensembl:ENSG00000135679; isVersionOf uniprot:Q00987
  species $pm in cell = 1;  // hasPart uniprot:P04637 uniprot:Q00987

  // Parameters:
  S = 1000;
  alpha = 0.1;
  // For the stress condition Hypoxia, the value should be changed to 0.01. For the rest of the stress conditions the value remains the same.
  k_t = 0.03;
  k_tl = 1.4;
  k_b = 7200;
  // For the stress conditions Nutlin and DNA damage, the values should be changed to 500 and 2500 respectively. For the rest of the stress conditions, the value remains the same.
  k_f = 5000;
  beta = 0.6;
  // For the stress condition DNA damage, the values should be changed to 0.5. For the rest of the stress conditions the value remains the same.
  gamma = 0.2;
  // For the stress conditions DNA damage, Oncogene and Hypoxia, the value should be changed to 2. For Nutlin the value remains the same.
  delta = 11;

  // Rate rules:
  p' = S - k_f*p*m - alpha*p + (k_b + gamma)*pm;
  mm' = k_t*p^2 - beta*mm;
  m' = k_tl*mm - k_f*p*m + (k_b + delta)*pm - gamma*m;
  pm' = k_f*p*m - (k_b + delta)*pm - gamma*pm;

  // Unit definitions:
  unit volume = dimensionless;
  unit time = 3600 second;
  unit substance = dimensionless;
end
